Tomav - CG fwd (xcg = 26.1793 m), cruzeiro com 50% do combustivel
# W = 2050761.9 N, CL = 0.4551

#Mach
 0.850

#IYsym   IZsym   Zsym
 0       0       0.0

#Sref    Cref    Bref
330.0000   6.5465   58.8643

#Xref    Yref    Zref
26.1793   0.0     0.0

# CDp
0.01433


#--------------------------------------------------
SURFACE
Wing
#Nchordwise  Cspace  Nspanwise  Sspace
12           1.0     40         -1.1

COMPONENT
1

YDUPLICATE
0.0

ANGLE
0.0

SCALE
1.0   1.0   1.0

TRANSLATE
0.0  0.0  -0.6711

# eta = 0.000
SECTION
#Xle    Yle    Zle     Chord   Ainc  Nspanwise  Sspace
16.9000  0.0000  -1.8500  9.5831  0.0
AFILE
airfoil.dat
DESIGN
iw 1.0

# eta = 0.100
SECTION
#Xle    Yle    Zle     Chord   Ainc  Nspanwise  Sspace
19.1572  2.9350  -1.5932  8.7899  0.0
AFILE
airfoil.dat
CONTROL
slat     -1.0  -0.080  0. 0. 0.  +1
CONTROL
flap      1.0  0.670  0. 0. 0.  +1
DESIGN
iw 1.0

# eta = 0.650
SECTION
#Xle    Yle    Zle     Chord   Ainc  Nspanwise  Sspace
31.6130  19.1309  -0.1763  4.4130  0.0
AFILE
airfoil.dat
CONTROL
slat     -1.0  -0.080  0. 0. 0.  +1
CONTROL
flap      1.0  0.670  0. 0. 0.  +1
DESIGN
iw 1.0

# eta = 0.660
SECTION
#Xle    Yle    Zle     Chord   Ainc  Nspanwise  Sspace
31.8394  19.4252  -0.1505  4.3335  0.0
AFILE
airfoil.dat
CONTROL
slat     -1.0  -0.080  0. 0. 0.  +1
CONTROL
aileron  -1.0  0.700  0. 0. 0.  -1
DESIGN
iw 1.0

# eta = 0.700
SECTION
#Xle    Yle    Zle     Chord   Ainc  Nspanwise  Sspace
32.7448  20.6025  -0.0475  4.0153  0.0
AFILE
airfoil.dat
CONTROL
slat     -1.0  -0.080  0. 0. 0.  +1
CONTROL
aileron  -1.0  0.700  0. 0. 0.  -1
DESIGN
iw 1.0

# eta = 0.980
SECTION
#Xle    Yle    Zle     Chord   Ainc  Nspanwise  Sspace
39.0827  28.8435  0.6735  1.7882  0.0
AFILE
airfoil.dat
CONTROL
aileron  -1.0  0.700  0. 0. 0.  -1
DESIGN
iw 1.0

# eta = 1.000
SECTION
#Xle    Yle    Zle     Chord   Ainc  Nspanwise  Sspace
39.5354  29.4321  0.7250  1.6291  0.0
AFILE
airfoil.dat
DESIGN
iw 1.0

#--------------------------------------------------
SURFACE
Stab
#Nchordwise  Cspace  Nspanwise  Sspace
6            1.0     15         -1.1

COMPONENT
1

YDUPLICATE
0.0

SCALE
1.0  1.0  1.0

TRANSLATE
0.0  0.0  1.7516

SECTION
#Xle    Yle    Zle     Chord   Ainc  Nspanwise  Sspace
48.7888  0.0  1.9350  6.2112  0.
CONTROL
elevator  1.0  0.600    0. 0. 0.  1
DESIGN
it 1.0

SECTION
#Xle    Yle    Zle     Chord   Ainc  Nspanwise  Sspace
56.8341  8.3852  2.8163  2.1739  0.
CONTROL
elevator  1.0  0.600    0. 0. 0.  1
DESIGN
it 1.0

#--------------------------------------------------
SURFACE
Fin
#Nchordwise  Cspace   Nspanwise  Sspace
7            1.0      11          1.0

COMPONENT
1

SCALE
1.0   1.0  1.0

TRANSLATE
0.0  0.0  0.7516

SECTION
#Xle    Yle    Zle     Chord   Ainc  Nspanwise  Sspace
45.0457  0.0  2.9350  9.4543  0.
CONTROL
rudder  1.0  0.700   0. 0. 0.  1

SECTION
#Xle    Yle    Zle     Chord   Ainc  Nspanwise  Sspace
55.2011  0.0  12.5074  3.3090  0.
CONTROL
rudder  1.0  0.700   0. 0. 0.  1

#--------------------------------------------------
BODY
Fuselage
# Nbody Bspace
30 1.0

SCALE
# Length Diameter Diameter
58.0000 5.8700 5.8700

BFILE
fuseB737_nondim.dat

#--------------------------------------------------
SURFACE
Nacelle
#Nchordwise  Cspace   Nspanwise  Sspace
6            1.0      12          0.0

COMPONENT
1

YDUPLICATE
0.0

SCALE
# Length, Hor. radius, and Vert. radius
5.8000   1.7500  1.7500

TRANSLATE
19.2000  10.5000  -3.6056

SECTION
#Xle   Yle    Zle      Chord   Ainc  Nspanwise  Sspace
 0.00  0.0    1.0       1.0   0.    1          0.

SECTION
#Xle   Yle    Zle      Chord   Ainc  Nspanwise  Sspace
 0.00  0.5    0.866     1.0    0.    1          0.

SECTION
#Xle   Yle    Zle      Chord   Ainc  Nspanwise  Sspace
 0.00  0.866  0.5       1.0    0.    1          0.

SECTION
#Xle   Yle    Zle      Chord   Ainc  Nspanwise  Sspace
 0.00  1.0    0.0       1.0    0.    1          0.

SECTION
#Xle   Yle    Zle      Chord   Ainc  Nspanwise  Sspace
 0.00  0.866 -0.5       1.0    0.    1          0.

SECTION
#Xle   Yle    Zle      Chord   Ainc  Nspanwise  Sspace
 0.00  0.5   -0.866     1.0    0.    1          0.

SECTION
#Xle   Yle    Zle      Chord   Ainc  Nspanwise  Sspace
 0.00  0.0   -1.0       1.0    0.    1          0.

SECTION
#Xle   Yle    Zle      Chord   Ainc  Nspanwise  Sspace
 0.00 -0.5   -0.866     1.0    0.    1          0.

SECTION
#Xle   Yle    Zle      Chord   Ainc  Nspanwise  Sspace
 0.00 -0.866 -0.5       1.0    0.    1          0.

SECTION
#Xle   Yle    Zle      Chord   Ainc  Nspanwise  Sspace
 0.00 -1.0    0.0       1.0    0.    1          0.

SECTION
#Xle   Yle    Zle      Chord   Ainc  Nspanwise  Sspace
 0.00 -0.866  0.5       1.0    0.    1          0.

SECTION
#Xle   Yle    Zle      Chord   Ainc  Nspanwise  Sspace
 0.00 -0.5    0.866     1.0    0.    1          0.

SECTION
#Xle   Yle    Zle      Chord   Ainc  Nspanwise  Sspace
 0.00  0.0    1.0       1.0    0.    1          0.
