Tomav2 - CG dianteiro

#Mach
0.0

#IYsym  IZsym  Zsym
 0      0      0.0

#Sref     Cref      Bref
 330.0000    6.5465   58.8643

#Xref     Yref      Zref
  26.1793    0.0000    0.0000

# CDp (CD0 limpo do designTool no ponto de projeto)
  0.01417

#----------------------------------------------------------------------
SURFACE
Wing
#Nchordwise  Cspace  Nspanwise  Sspace
10           1.0     40         -2.0

COMPONENT
1

YDUPLICATE
0.0

SECTION
#Xle      Yle      Zle      Chord    Ainc
  16.9000   0.0000  -1.8500   9.5831   0.0000
AFILE
tomav_wing.dat

SECTION
#Xle      Yle      Zle      Chord    Ainc
  31.6130  19.1309  -0.1763   4.4130  -1.9500
AFILE
tomav_wing.dat
CONTROL
aileron   -1.00  0.700  0. 0. 0.  -1

SECTION
#Xle      Yle      Zle      Chord    Ainc
  38.8563  28.5492   0.6477   1.8677  -2.9100
AFILE
tomav_wing.dat
CONTROL
aileron   -1.00  0.700  0. 0. 0.  -1

SECTION
#Xle      Yle      Zle      Chord    Ainc
  39.5354  29.4321   0.7250   1.6291  -3.0000
AFILE
tomav_wing.dat

#----------------------------------------------------------------------
SURFACE
Stab
#Nchordwise  Cspace  Nspanwise  Sspace
8           1.0     16         -2.0

COMPONENT
2

YDUPLICATE
0.0

SECTION
#Xle      Yle      Zle      Chord    Ainc
  48.7888   0.0000   1.9350   6.2112   0.0000
NACA
0009
CONTROL
elevator   1.00  0.700  0. 0. 0.  +1
DESIGN
it 1.0

SECTION
#Xle      Yle      Zle      Chord    Ainc
  56.8341   8.3852   2.8163   2.1739   0.0000
NACA
0009
CONTROL
elevator   1.00  0.700  0. 0. 0.  +1
DESIGN
it 1.0

#----------------------------------------------------------------------
SURFACE
Fin
#Nchordwise  Cspace  Nspanwise  Sspace
8           1.0     12          1.0

COMPONENT
3

SECTION
#Xle      Yle      Zle      Chord    Ainc
  45.0457   0.0000   2.9350   9.4543   0.0000
NACA
0009
CONTROL
rudder     1.00  0.650  0. 0. 0.  +1

SECTION
#Xle      Yle      Zle      Chord    Ainc
  55.2011   0.0000  12.5074   3.3090   0.0000
NACA
0009
CONTROL
rudder     1.00  0.650  0. 0. 0.  +1

#----------------------------------------------------------------------
BODY
Fuselage
# Nbody  Bspace
30      1.0

SCALE
# comprimento, diametro, diametro
  58.0000    5.8700    5.8700

TRANSLATE
0.0  0.0    -0.6678

BFILE
fuse_nondim.dat

#----------------------------------------------------------------------
SURFACE
Nacelle
#Nchordwise  Cspace  Nspanwise  Sspace
6            1.0     12         0.0

COMPONENT
4

YDUPLICATE
0.0

SCALE
# comprimento, raio horizontal, raio vertical
   5.8000    1.7500    1.7500

TRANSLATE
  19.2000   10.5000   -3.0750

SECTION
#Xle   Yle    Zle     Chord  Ainc  Nspan  Sspace
0.00  0.0000  1.0000  1.0    0.0   1      0.

SECTION
#Xle   Yle    Zle     Chord  Ainc  Nspan  Sspace
0.00 -0.5000  0.8660  1.0    0.0   1      0.

SECTION
#Xle   Yle    Zle     Chord  Ainc  Nspan  Sspace
0.00 -0.8660  0.5000  1.0    0.0   1      0.

SECTION
#Xle   Yle    Zle     Chord  Ainc  Nspan  Sspace
0.00 -1.0000  0.0000  1.0    0.0   1      0.

SECTION
#Xle   Yle    Zle     Chord  Ainc  Nspan  Sspace
0.00 -0.8660 -0.5000  1.0    0.0   1      0.

SECTION
#Xle   Yle    Zle     Chord  Ainc  Nspan  Sspace
0.00 -0.5000 -0.8660  1.0    0.0   1      0.

SECTION
#Xle   Yle    Zle     Chord  Ainc  Nspan  Sspace
0.00 -0.0000 -1.0000  1.0    0.0   1      0.

SECTION
#Xle   Yle    Zle     Chord  Ainc  Nspan  Sspace
0.00  0.5000 -0.8660  1.0    0.0   1      0.

SECTION
#Xle   Yle    Zle     Chord  Ainc  Nspan  Sspace
0.00  0.8660 -0.5000  1.0    0.0   1      0.

SECTION
#Xle   Yle    Zle     Chord  Ainc  Nspan  Sspace
0.00  1.0000 -0.0000  1.0    0.0   1      0.

SECTION
#Xle   Yle    Zle     Chord  Ainc  Nspan  Sspace
0.00  0.8660  0.5000  1.0    0.0   1      0.

SECTION
#Xle   Yle    Zle     Chord  Ainc  Nspan  Sspace
0.00  0.5000  0.8660  1.0    0.0   1      0.

SECTION
#Xle   Yle    Zle     Chord  Ainc  Nspan  Sspace
0.00  0.0000  1.0000  1.0    0.0   1      0.
